*HEADING
** ex01 Validacao coluna engastada e livre com carga pontual na extremidade livre
**
*NODE, NSET=ALL_NODES
1, 0.0, 0.0
21, 1.0, 0.0
**
*NGEN, NSET=ALL_NODES
1, 21, 1
**
*NSET, NSET=START_NODE
1
**
*NSET, NSET=END_NODE
21
**
*ELEMENT, TYPE=B23, ELSET=ALL_ELEMENTS
1, 1, 2
**
*ELGEN, ELSET=ALL_ELEMENTS
1, 20, 1, 1
**
*MATERIAL, NAME=MATERIAL-1
*ELASTIC
1.0e6, 0.0
**
*BEAM SECTION, ELSET=ALL_ELEMENTS, SECTION=RECT, MATERIAL=MATERIAL-1
0.20, 0.30
**
*STEP, NAME=BUCKLING, PERTURBATION
*BUCKLE, EIGENSOLVER=LANCZOS
3,
**
*BOUNDARY
START_NODE, 1, 2
START_NODE, 6, 6
**
*CLOAD
END_NODE, 1, -1.0
**
*END STEP
